// SBML level 2 version 4

function Catalytic_activation__irrev(substrate, Activator, Kms, V, Ka)
  V*substrate*Activator/((Kms + substrate)*(Ka + Activator));
end
Catalytic_activation__irrev is "Catalytic activation (irrev)";

function Constant_flux__irreversible(v)
  v;
end
Constant_flux__irreversible is "Constant flux (irreversible)";

model New_Model()

  // Compartments:
  compartment compartment = 4.14e-15;

  // Species:
  species A in compartment = 0.01;
  species B in compartment = 0.01;
  species AB in compartment = 0.01;
  species C1 in compartment = 0;
  species L in compartment = 1.01537625e-6;
  species $p in compartment = 1;

  // Reactions:
  CreaA: => A; compartment*Constant_flux__irreversible(CreaA_v);
    CreaA_v = 0.01;
  CreaB: => B; compartment*Constant_flux__irreversible(CreaB_v);
    CreaB_v = 0.01;
  Crea_complesso: A + AB => C1; compartment*Crea_complesso_k1*A*AB;
    Crea_complesso_k1 = 1000;
  Distr_complesso: C1 => A + AB; compartment*Distr_complesso_k1*C1;
    Distr_complesso_k1 = 14.86;
  completa_processo: C1 + B => 2 AB; compartment*completa_processo_k1*C1*B;
    completa_processo_k1 = 1000;
  CreaL: $p => L; compartment*Catalytic_activation__irrev(p, AB, Kms, V, Ka);  // modifiers: AB
    Kms = 1000; V = 0.03; Ka = 1000;
end
