// SBML level 2 version 4

function Catalytic_activation__irrev_0(substrate, Activator, Kms, V, Ka)
  V*substrate*Activator/((Kms + substrate)*(Ka + Activator));
end
Catalytic_activation__irrev_0 is "Catalytic activation (irrev)";

function Constant_flux__irreversible_0(v)
  v;
end
Constant_flux__irreversible_0 is "Constant flux (irreversible)";

model New_Model()
  // New Model_1

  // Compartments:
  compartment compartment = 4.14e-15;

  // Species:
  species A_0 in compartment = 4.830918e18;
  species B_0 in compartment = 2.415459e18;
  species C in compartment = 0;

  // Reactions:
  reaction: A_0 + B_0 => C; compartment*k1*A_0*B_0;
    k1 = 1e-19;

  // Unit definitions:
  unit substance = item;
end
