// SBML level 2 version 4

function Constant_flux__irreversible_0(v)
  v;
end
Constant_flux__irreversible_0 is "Constant flux (irreversible)";

function Catalytic_activation__irrev_0(substrate, Activator, Kms, V, Ka)
  V*substrate*Activator/((Kms + substrate)*(Ka + Activator));
end
Catalytic_activation__irrev_0 is "Catalytic activation (irrev)";

model New_Model()
  // New Model_1

  // Compartments:
  compartment compartment = 4.14e-15;

  // Species:
  species A_0 in compartment = 4.830918e18;
  species B_0 in compartment = 2.415459e18;
  species C in compartment = 0;

  // Reactions:
  reaction: A_0 + B_0 => C; compartment*k1*A_0*B_0;
    k1 = 1e-19;
  reaction_2: => A_0; compartment*Constant_flux__irreversible_0(reaction_2_v);
    reaction_2_v = 1e17;
  reaction_1: => B_0; compartment*Constant_flux__irreversible_0(reaction_1_v);
    reaction_1_v = 1e17;

  // Unit definitions:
  unit substance = item;
end
