// SBML level 2 version 4

function Constant_flux__irreversible(v)
  v;
end
Constant_flux__irreversible is "Constant flux (irreversible)";

function Catalytic_activation__irrev(substrate, Activator, Kms, V, Ka)
  V*substrate*Activator/((Kms + substrate)*(Ka + Activator));
end
Catalytic_activation__irrev is "Catalytic activation (irrev)";

model New_Model()
  // New Model_1

  // Compartments:
  compartment compartment = 4.14e-15;

  // Species:
  species A_0 in compartment = 4.830918e18;
  species B_0 in compartment = 3.623188e18;
  species C in compartment = 0;
  species L in compartment = 2.415459e18;
  species $p in compartment = 241545893719807;

  // Reactions:
  reaction: A_0 + B_0 => C; compartment*reaction_k1*A_0*B_0;
    reaction_k1 = 1e-19;
  reaction_2: => A_0; compartment*Constant_flux__irreversible(reaction_2_v);
    reaction_2_v = 1e17;
  reaction_1: => B_0; compartment*Constant_flux__irreversible(reaction_1_v);
    reaction_1_v = 1e17;
  reaction_3: $p + C => L + C; compartment*reaction_3_k1*p*C;
    reaction_3_k1 = 5e-17;

  // Unit definitions:
  unit substance = item;
end
