// SBML level 2 version 4

model New_Model_1()

  // Compartments:
  compartment compartment = 4.19e-15;

  // Species:
  species A_0 in compartment = 4.77327e18;
  species B_0 in compartment = 3.579952e18;
  species C in compartment = 0;
  species L in compartment = 2.386635e18;
  species $p in compartment = 238663484486874;
  species $Aext in compartment = 4.77327e17;
  species $Bext in compartment = 4.77327e17;

  // Reactions:
  reaction: A_0 + B_0 => C; compartment*reaction_k1*A_0*B_0; reaction is "produci_C";
    reaction_k1 = 1e-19;
  produci_L: $p + C => L + C; compartment*produci_L_k1*p*C;
    produci_L_k1 = 5e-17;
  Aext_A: $Aext => A_0; compartment*Aext_A_k1*Aext;
    Aext_A_k1 = 1;
  A_Aext: A_0 => $Aext; compartment*A_Aext_k1*A_0;
    A_Aext_k1 = 1;
  Bext_B: $Bext => B_0; compartment*Bext_B_k1*Bext;
    Bext_B_k1 = 1;
  B_Bext: B_0 => $Bext; compartment*B_Bext_k1*B_0;
    B_Bext_k1 = 1;

  // Unit definitions:
  unit substance = item;
end
