// SBML level 2 version 4

model New_Model_1()

  // Compartments:
  compartment compartment = 4.19e-15;

  // Species:
  species A_0 in compartment = 1.909308e18;
  species B_0 in compartment = 3.579952e16;
  species C in compartment = 2.386635e16;
  species L in compartment = 2.386635e18;
  species $p in compartment = 238663484486874;
  species $Aext in compartment = 2.386635e17;
  species $Bext in compartment = 2.386635e17;
  species Compl in compartment = 0;
  species A_uscita in compartment = 0;
  species A_ingresso in compartment = 0;
  species B_ingresso in compartment = 0;
  species B_uscita in compartment = 0;

  // Reactions:
  reaction: A_0 + C => Compl; compartment*reaction_k1*A_0*C; reaction is "produci_Compl";
    reaction_k1 = 5e-19;
  produci_L: $p + C => L + C; compartment*produci_L_k1*p*C;
    produci_L_k1 = 5e-17;
  Aext_A: $Aext => A_0; compartment*Aext_A_k1*Aext;
    Aext_A_k1 = 1;
  A_Aext: A_0 => $Aext; compartment*A_Aext_k1*A_0;
    A_Aext_k1 = 1;
  Bext_B: $Bext => B_0; compartment*Bext_B_k1*Bext;
    Bext_B_k1 = 1;
  B_Bext: B_0 => $Bext; compartment*B_Bext_k1*B_0;
    B_Bext_k1 = 1;
  Compl_A_C: Compl => A_0 + C; compartment*Compl_A_C_k1*Compl;
    Compl_A_C_k1 = 1e-6;
  produci_C: Compl + B_0 => 2 C; compartment*produci_C_k1*Compl*B_0;
    produci_C_k1 = 1e-18;
  A_uscita_0: A_0 => A_uscita; compartment*A_uscita_0_k1*A_0; A_uscita_0 is "A-uscita";
    A_uscita_0_k1 = 1;
  A_ingresso_0: $Aext => A_ingresso; compartment*A_ingresso_0_k1*Aext; A_ingresso_0 is "A-ingresso";
    A_ingresso_0_k1 = 1;
  B_ingresso_0: $Bext => B_ingresso; compartment*B_ingresso_0_k1*Bext; B_ingresso_0 is "B-ingresso";
    B_ingresso_0_k1 = 1;
  B_uscita_0: B_0 => B_uscita; compartment*B_uscita_0_k1*B_0; B_uscita_0 is "B-uscita";
    B_uscita_0_k1 = 1;

  // Unit definitions:
  unit substance = item;
end
