// SBML level 2 version 4

model test3()

  // Compartments:
  compartment default = 1 volume;
  compartment c1 in default = 1 volume; c1 is "compartment";

  // Species:
  substanceOnly species $Xo in c1 = 100;
  species S1 in c1 = 0;
  species S2 in c1 = 0;
  species S3 in c1 = 0;
  substanceOnly species $X1 in c1 = 0;

  // Parameters:
  k1 = 15 substance;
  k2 = 14 substance;
  r1 = 0.75 substance;

  // Reactions:
  J1: $Xo => S1; Xo*r1;
  J2: S1 => S2; S1 + k1;
  J3: S2 => S3; S2 + k2;
  J4: S3 => $X1; S3*r1 - k1;

  // Unit definitions:
  unit substance = mole;
  unit volume = litre;
  unit area = metre^2;
  unit length = metre;
  unit time = second;
end
