// SBML level 2 version 4

function Rate_Law_for_R2(K, vol, A, B)
  K/vol^(1/3)*(A - B);
end

model New_Model()

  // Compartments:
  compartment default = 1 volume;
  compartment compartment in default = 1 volume;

  // Species:
  species A in compartment = 0.001;
  species Astar in compartment = 0.01;
  species B in compartment = 0.001;
  species Bstar in compartment = 0.01;
  species AB in compartment = 0.0001;
  species Comp1 in compartment = 0;

  // Reactions:
  NoA: A + Astar => Astar; compartment*NoA_k1*A*Astar;
    NoA_k1 = 0;
  DiffA: A + Astar => Astar; compartment*Rate_Law_for_R2(DiffA_K, DiffA_vol, A, Astar);
    DiffA_K = 3.8688e-8; DiffA_vol = 4.19e-15;
  DiffB: B + Bstar => Bstar; compartment*Rate_Law_for_R2(DiffB_K, DiffB_vol, B, Bstar);
    DiffB_K = 3.8688e-8; DiffB_vol = 4.19e-15;
  Cond_p1: A + AB => Comp1; compartment*Cond_p1_k1*A*AB;
    Cond_p1_k1 = 1000;
  Cond_p2: Comp1 + B => 2 AB; compartment*Cond_p2_k1*Comp1*B;
    Cond_p2_k1 = 1000;
  Cond_p1_inv: Comp1 => A + AB; compartment*Cond_p1_inv_k1*Comp1;
    Cond_p1_inv_k1 = 14.86;

  // Unit definitions:
  unit substance = mole;
  unit volume = litre;
  unit area = metre^2;
  unit length = metre;
  unit time = second;
end
